# KALJ NVE, read data


atom_style atomic
boundary p p p #periodic boundary cond. in each direction

variable u loop 0 10000
label myloop
read_data ./modfied_new/confdump.modified.10000000$u.data
## lj smooth cutoff
pair_style lj/smooth/linear 2.5
###pair_coeff * * 1.0 1.0
pair_coeff 1 1 1.0 1.0 2.5
###pair_coeff * * 1.5 0.80
pair_style lj/smooth/linear 2.0
pair_coeff 1 2 1.5 0.80 2.0
###pair_coeff * * 0.5 0.88
pair_style lj/smooth/linear 2.2
pair_coeff 2 2 0.5 0.88 2.2


## for WCA
#pair_style cosine/squared 2.5    # Define interaction potential.
#pair_coeff * * 1.0 1.0
#pair_coeff 1 1 1.0 1.0 2.5
#pair_coeff 1 1 1.0 1.0 wca
#pair_coeff 1 1 1.0 1.0 2.5 wca
#pair_coeff * * 1.5 0.80
#pair_coeff 1 2 1.5 0.80 2.0
#pair_coeff 1 2 1.5 0.80 wca
#pair_coeff 1 2 1.5 0.80 2.0 wca
#pair_coeff * * 0.5 0.88
#pair_coeff 2 2 0.5 0.88 2.2
#pair_coeff 2 2 0.5 0.88 wca
#pair_coeff 2 2 0.5 0.88 2.2 wca

## for lj/cutoff
#pair_style    lj/cut 2.5
#pair_coeff    1 1  1.0 1.0  2.5  # type type eps sigma rcut
#pair_coeff  1 2  1.5 0.80 2.0  #typeA typeB epsAB sigmaAB rcutAB=2.5*0.8=2.0
#pair_coeff  2 2  0.5 0.88 2.2  #typeB typeB epsBB sigmaBB rcutBB=2.5*0.88=2.2

timestep 0.005 #Delta t
#
# pair_modify shift yes
# kspace_style pppm 1e-5
#
neighbor          0.3 bin
neigh_modify      every 1 delay 0 check yes # Update neighbor

# print every 100 MD steps positions and velocities into confdump.$u.data files
dump mydump all custom 10000 ./new/min_config.10000000.$u.data id type x y z vx vy vz
#dump myDump all custom 4 dump/dumpT${T}.NVT.atom.velocity id type xs ys zs vx vy vz
dump_modify mydump sort id

#compute rdfAABBAB all rdf 25 1 1 2 2 1 2
#fix myrdf all ave/time 1 1 1 c_rdfAABBAB[*] file ./Radial_distribution/gofrAABBAB_temp_0.5_50000.data mode vector
#set numerical integrator

fix nve1 all nve # NVE; default is velocity Verlet
thermo 1
minimize 1.0e-20 1.0e-20 10000 100000
clear
next u
jump SELF myloop


# ---------- Define outputs ---------------------
# thermo 100
# thermo_style custom step temp press vol lx ly lz pe ke etotal

# ---------- Define Settings and Run ---------------------

# ---------- Run Equilibration ---------------------
# thermo 100
# thermo_style custom step temp press vol lx ly lz pe ke etotal
# thermo_modify	flush yes

# variable        double_temp equal ${T}*2
# velocity all create ${double_temp} 28459 rot yes dist gaussian mom yes


# NVT

# fix 1 all nvt temp $T $T 1.0

# reset_timestep 0
# timestep 5e-3

# run 20000


# reset_timestep 0

# dump myDump all custom 4 dump/dumpT${T}.NVT.atom.velocity id type xs ys zs vx vy vz

# run 200000
